# DEM run: coupled CFD-DEM fluidized bed (driven by cfdemSolverPiso)
echo            both
log             ../DEM/log.liggghts

atom_style      granular
atom_modify     map array
communicate     single vel yes

boundary        m m m
newton          off

units           si
processors      2 2 2

read_restart    ../DEM/post/restart/liggghts.restart

neighbor        0.0005 bin
neigh_modify    delay 0

fix         m1 all property/global youngsModulus peratomtype 5.e6
fix         m2 all property/global poissonsRatio peratomtype 0.45
fix         m3 all property/global coefficientRestitution peratomtypepair 1 0.3
fix         m4 all property/global coefficientFriction peratomtypepair 1 0.5

pair_style  gran model hertz tangential history
pair_coeff  * *

timestep    0.00001
fix         gravi all gravity 9.81 vector 0.0 0.0 -1.0

fix         zwalls1 all wall/gran model hertz tangential history primitive type 1 zplane 0.0
fix         zwalls2 all wall/gran model hertz tangential history primitive type 1 zplane 0.15
fix         cylwalls all wall/gran model hertz tangential history primitive type 1 zcylinder 0.01385 0. 0.

# CFD coupling (OpenFOAM / CFDEM)
fix         cfd all couple/cfd couple_every 100 mpi
fix         cfd2 all couple/cfd/force/implicit

fix         integr all nve/sphere

compute     centerOfMass all com
compute     explDrag all reduce update_on_run_end yes sum f_dragforce[1] f_dragforce[2] f_dragforce[3]

variable    totalDragX equal f_cfd2[1]
variable    totalDragY equal f_cfd2[2]
variable    totalDragZ equal f_cfd2[3]
variable    explicitDragX equal c_explDrag[1]
variable    explicitDragY equal c_explDrag[2]
variable    explicitDragZ equal c_explDrag[3]
variable    time equal step*dt

fix         extra all print 100 "${time} ${explicitDragX} ${explicitDragY} ${explicitDragZ} ${totalDragX} ${totalDragY} ${totalDragZ}" file ../DEM/post/forces.txt title "# time expDrag(X Y Z) totDrag(X Y Z)"

compute         rke all erotate/sphere
thermo_style    custom step atoms ke c_rke vol c_centerOfMass[3]
thermo          100
thermo_modify   lost ignore norm no

# Dump every 1000 DEM steps = 0.01 s (dt = 1e-5)
dump            dmp all custom 1000 ../DEM/post/dump*.liggghts_run id type x y z vx vy vz fx fy fz f_dragforce[1] f_dragforce[2] f_dragforce[3] radius

run             0
